OpenVSP model (file version 5), 1 components.
Geometry view with OpenVSP parameter names; values to 6 digits, angles in degrees, lengths in the model's unit.

Wing "main_wing"
  location (X Y Z) 0 0 0, rotation 0 0 0
  symmetric about XZ
  bounding box size 71.9934 28.0894 3.67157
  totals: TotalSpan=28.5991 TotalProjectedSpan=28 TotalChord=29.2466 TotalArea=837.947 TotalAR=0.93562
  root: chord 71.9561, twist 0, airfoil file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 BaseThickChord=0.032798 ThickChord=0.0327406
  sections:
    n  Span     Root_Chord  Tip_Chord  Area     Sweep    Sweep_Location  Dihedral  Twist  Twist_Location  tip airfoil
    1  2.05435  71.9561     54.8097    130.211  79.1533  0.25            13.2084   0      0.25            as above
    2  2.04958  54.8097     39.5939    96.7441  78.9942  0.25            12.6287   0      0.25            airfoil file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 BaseThickChord=0.0300313 ThickChord=0.0299943
    3  2.04683  39.5939     27.6998    68.8694  76.5545  0.25            12.28     0      0.25            airfoil file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 BaseThickChord=0.0276978 ThickChord=0.0276845
    4  2.03723  27.6998     19.3647    47.9407  72.51    0.25            10.971    0      0.25            airfoil file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 BaseThickChord=0.0279725 ThickChord=0.0279762
    5  2.02816  19.3647     14.7512    34.5963  65.4233  0.25            9.55925   0      0.25            airfoil file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 BaseThickChord=0.0282108 ThickChord=0.0282067
    6  2.03641  14.7512     10.0286    25.2309  65.7527  0.25            10.8512   0      0.25            airfoil file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 BaseThickChord=0.0281903 ThickChord=0.0281912
    7  2.04698  10.0286     5.00003    15.3816  66.6897  0.25            12.2986   0      0.25            airfoil file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 BaseThickChord=0.0294007 ThickChord=0.04
